// COMSOL Multiphysics 5.1.0.136 model "Day 3 2015 Test.mph"
// Outline of the model tree

Parameters
  rsize = 15[km]
  g = 9.8[m/s^2]
  dens = 2600[kg/m^3]
  zsize = 15[km]
  Rmc = 1[km]
  Dcmc = 7.5[km]
  Dtmc = Dcmc-Rmc
  OP = 332[MPa]

Variables
  var1 "Variables 1"
    MagmaLd = dens*g*Dtmc+dens*g*(z-Dtmc)-OP

Geometry
  geom1 "Geometry 1" (2D axisymmetric, length unit m)
    r1: Rectangle | pos = {0, -zsize}; size = {rsize, zsize}
    c1: Circle | pos = {0, -Dcmc}; r = Rmc
    dif1: Difference | input = r1; input2 = c1
    fin: Finalize "Form Union"

Materials
  mat1: Common "Granite" on all domains
    def "Basic"
      thermalexpansioncoefficient = 7e-6[1/K]
      heatcapacity = 850[J/(kg*K)]
      density = 2600[kg/m^3]
      thermalconductivity = 2.9[W/(m*K)]
    Enu "Young's modulus and Poisson's ratio"
      youngsmodulus = 60e9[Pa]
      poissonsratio = 0.25

Physics
  solid: SolidMechanics on all domains
    dependent variable u = {u, v, w}
    lemm1: LinearElasticModel "Linear Elastic Material 1" (default)
      iss1: InitialStressandStrain on all domains | Sil = dens*g*z
    axi1: AxialSymmetrySolid "Axial Symmetry 1" (default)
    free1: Free (default)
    init1: init "Initial Values 1" (default)
    roll1: Roller on boundaries 2, 5
    bndl1: BoundaryLoad on boundaries 6, 7 | FperArea = {0, 0, MagmaLd}; coordinateSystem = sys1
    gr1: Gravity on domains 1 | g = {0, 0, -g}

Mesh
  mesh1 "Mesh 1"
    size: MeshSizeDefault | hmax = 1010; hmin = 4.5; hcurve = 0.3; hnarrow = 1; hgrad = 1.3; hauto = 5
    edg1: Edge on boundaries 6, 7
      size1: Size on boundaries 6, 7 | hmax = 50; hauto = 5; custom = on
    ftri1: FreeTri "Free Triangular 1" on remaining entities
      xscale = 1
      yscale = 1
      smoothcontrol = on
      smoothmaxiter = 8
      smoothmaxdepth = 8

Studies
  std1 "Study 1"
    stat: Stationary

Solver configurations
  sol1 "Solution 1" (study std1)
    v1: Variables "Dependent Variables 1"
    s1: Stationary "Stationary Solver 1"
      dDef: Direct
      fc1: FullyCoupled | linsolver = dDef; termonres = auto; reserrfact = 1000

Datasets
  dset1: Solution | solution = sol1
  rev1: Revolve2D "Revolution 2D 1" | data = dset1; genpoints = {{0, 0}, {0, 1}}; startangle = -90; revangle = 225

Plots
  pg1: PlotGroup2D "Stress (solid)" | data = dset1
    surf1: Surface | expr = u; unit = m
      def: Deform "Deformation" (disabled) | expr = {u, w}
  pg2: PlotGroup3D "Stress, 3D (solid)" | data = rev1
    surf1: Surface | expr = solid.mises
      def: Deform "Deformation" | expr = {cos(rev1phi)*u, sin(rev1phi)*u, w}; descr = Displacement field (Material)
  pg3: PlotGroup1D "1D Plot Group 3" | data = dset1
    lngr1: LineGraph "Uplift" on boundaries 4 | expr = w; xdata = expr; xdataexpr = r
  pg4: PlotGroup1D "1D Plot Group 4" | data = dset1
    lngr1: LineGraph "Rupture" on boundaries 6, 7 | expr = solid.sphi; unit = MPa; xdata = expr; xdataexpr = -z-Dcmc+Rmc

Exports
  plot1: Plot
    filename = /Volumes/Data/Users/ebg04747/Desktop/Volc/Week13 Inflation and Unrest plus Thanksgiving/Lab2 Inflation and failure/Instructor/Day 2 2015 Export test.txt